OpenVSP model (file version 5), 5 components.
Geometry view with OpenVSP parameter names; values to 6 digits, angles in degrees, lengths in the model's unit.
Overall bounding box: X_Min=-0.909995 X_Len=106.039 Y_Min=-81.5939 Y_Len=163.188 Z_Min=-23.3763 Z_Len=33.025

Blank "Plane"
  location (X Y Z) 0 0 0, rotation 0 2 0

Wing "Wing", child of "Plane"
  location (X Y Z) 13.9944 0 -3.27039, rotation 0 2 0; relative location 14.1 0 -2.78, rotation 0 0 0
  symmetric about XZ
  bounding box size 46.2396 163.188 5.84088
  totals: TotalSpan=162 TotalProjectedSpan=162 TotalChord=20.9333 TotalArea=3295.8 TotalAR=7.96286 MAC=22.2417 RelativeDihedralFlag=1
  root: chord 46, twist 0, NACA 4-series Camber=0.025 CamberLoc=0.32 ThickChord=0.09
  sections:
    n  Span  Root_Chord  Tip_Chord  Area   Sweep  Sweep_Location  Dihedral  Twist  Twist_Location  tip airfoil
    1  18    46          19.4       588.6  56     0               0         0      0.25            NACA 4-series Camber=0.025 CamberLoc=0.32 ThickChord=0.1
    2  60    19.4        14.6       1020   4.6    0               0         0      0.25            NACA 4-series Camber=0.025 CamberLoc=0.32 ThickChord=0.11
    3  3     14.6        11.6       39.3   45     0               0         0      0.25            as above

Fuselage "Fuselage", child of "Plane"
  location (X Y Z) -0.211947 0 -6.06936, rotation 0 4 0; relative location 0 0 -6.07306, rotation 0 2 0
  bounding box size 106.039 14.4879 25.8375
  Design: Length=105
  cross sections:
    n  XLocPercent  YLocPercent  YRotate   ZLocPercent  shape
    0  0            0            -4        -0.0320373   point
    1  0.25         0            -4        -0.00438596  ellipse Ellipse_Height=14.4717 Ellipse_Width=14.4879
    2  0.375        0            -4        0.0053       ellipse Ellipse_Height=13.2358 Ellipse_Width=13.7158
    3  0.5          0            -4        0.0157006    ellipse Ellipse_Height=11.2116 Ellipse_Width=11.3227
    4  0.625        0            -4.42453  0.0269554    ellipse Ellipse_Height=9.12287 Ellipse_Width=8.76541
    5  0.75         0            -4.84906  0.0392243    ellipse Ellipse_Height=7.14097 Ellipse_Width=6.41429
    6  0.875        0            -4        0.050242     ellipse Ellipse_Height=5.35878 Ellipse_Width=4.7
    7  0.9375       0            -4        0.056        ellipse Ellipse_Height=4.83433 Ellipse_Width=4.5
    8  0.986506     0            -4        0.06         ellipse Ellipse_Height=4.5 Ellipse_Width=4.5
    9  1            0            -4        0.0603376    point

Wing "Tail", child of "Plane"
  location (X Y Z) 83.3021 1.68165 -7.12487, rotation 39.9387 -1.96716 -1.28618; relative location 83.5 1.68165 -4.21333, rotation 40 -3.5 0
  symmetric about XZ
  bounding box size 21.1758 63.7357 30.3425
  totals: TotalSpan=60 TotalProjectedSpan=49.1491 TotalChord=15 TotalArea=900 TotalAR=2.68404 MAC=15.5556
  root: chord 20, twist 0, NACA 4-series Camber=0 CamberLoc=0.2 ThickChord=0.08
  sections:
    n  Span  Root_Chord  Tip_Chord  Area  Sweep  Sweep_Location  Dihedral  Twist  Twist_Location  tip airfoil
    1  30    20          10         450   17.5   0               -35       0      0.25            NACA 4-series Camber=0 CamberLoc=0.2 ThickChord=0.1

Blank "CoG", child of "Plane"
  location (X Y Z) 45 0 -1.53281, rotation 0 0 0

VSPAERO settings: Sref=3295.8 bref=162 cref=20.9333 Xcg=46 Ycg=0 Zcg=-6.65568 AlphaStart=5 AlphaEnd=7 AlphaNpts=1 BetaStart=0 BetaEnd=0 BetaNpts=1 MachStart=0.08 MachEnd=0 MachNpts=1 ReCref=1e+07 Vinf=100 Rho=0.002377
